// SBML level 2 version 4

model jak2_stat5_feedbacks()

  // Compartments:
  compartment cyt = 0.4;
  compartment nuc = 0.275;

  // Species:
  species EpoRJAK2 in cyt = init_EpoRJAK2;
  species EpoRpJAK2 in cyt = 0;
  species p1EpoRpJAK2 in cyt = 0;
  species p2EpoRpJAK2 in cyt = 0;
  species p12EpoRpJAK2 in cyt = 0;
  species EpoRJAK2_CIS in cyt = 0;
  species SHP1 in cyt = init_SHP1;
  species SHP1Act in cyt = 0;
  species STAT5 in cyt = init_STAT5;
  species pSTAT5 in cyt = 0;
  species npSTAT5 in nuc = 0;
  species CISnRNA1 in nuc = 0;
  species CISnRNA2 in nuc = 0;
  species CISnRNA3 in nuc = 0;
  species CISnRNA4 in nuc = 0;
  species CISnRNA5 in nuc = 0;
  species CISRNA in cyt = 0;
  species CIS in cyt = 0;
  species SOCS3nRNA1 in nuc = 0;
  species SOCS3nRNA2 in nuc = 0;
  species SOCS3nRNA3 in nuc = 0;
  species SOCS3nRNA4 in nuc = 0;
  species SOCS3nRNA5 in nuc = 0;
  species SOCS3RNA in cyt = 0;
  species SOCS3 in cyt = 0;

  // Parameters:
  CISEqc = 432.8716;
  CISInh = 7.851326e8;
  CISRNADelay = 0.1447769;
  CISRNAEqc = 1;
  CISRNATurn = 1000;
  CISTurn = 0.008398833;
  EpoRActJAK2 = 0.2673127;
  EpoRCISInh = 1000000;
  EpoRCISRemove = 5.429723;
  JAK2ActEpo = 633171.1;
  JAK2EpoRDeaSHP1 = 142.7247;
  SHP1ActEpoR = 0.001;
  SHP1Dea = 0.008162303;
  SOCS3Eqc = 173.6497;
  SOCS3Inh = 10.40836;
  SOCS3RNADelay = 1.064573;
  SOCS3RNAEqc = 1;
  SOCS3RNATurn = 0.008309095;
  SOCS3Turn = 10000;
  STAT5ActEpoR = 38.99115;
  STAT5ActJAK2 = 0.07810618;
  STAT5Exp = 0.07451609;
  STAT5Imp = 0.02688654;
  init_EpoRJAK2 = 3.976224;
  init_SHP1 = 26.72512;
  init_STAT5 = 79.7535;

  // Assignment rules:
  Epo := 1.25e-7;

  // Reactions:
  v_0: EpoRJAK2 => EpoRpJAK2; Epo*EpoRJAK2*JAK2ActEpo/(SOCS3*SOCS3Inh/SOCS3Eqc + 1);  // modifiers: SOCS3
  v_1: EpoRpJAK2 => EpoRJAK2; EpoRpJAK2*JAK2EpoRDeaSHP1*SHP1Act/init_SHP1;  // modifiers: SHP1Act
  v_2: EpoRpJAK2 => p1EpoRpJAK2; EpoRpJAK2*EpoRActJAK2/(SOCS3*SOCS3Inh/SOCS3Eqc + 1);  // modifiers: SOCS3
  v_3: EpoRpJAK2 => p2EpoRpJAK2; 3*EpoRpJAK2*EpoRActJAK2/((SOCS3*SOCS3Inh/SOCS3Eqc + 1)*(EpoRCISInh*EpoRJAK2_CIS + 1));  // modifiers: EpoRJAK2_CIS, SOCS3
  v_4: p1EpoRpJAK2 => p12EpoRpJAK2; 3*EpoRActJAK2*p1EpoRpJAK2/((SOCS3*SOCS3Inh/SOCS3Eqc + 1)*(EpoRCISInh*EpoRJAK2_CIS + 1));  // modifiers: EpoRJAK2_CIS, SOCS3
  v_5: p2EpoRpJAK2 => p12EpoRpJAK2; EpoRActJAK2*p2EpoRpJAK2/(SOCS3*SOCS3Inh/SOCS3Eqc + 1);  // modifiers: SOCS3
  v_6: p1EpoRpJAK2 => EpoRJAK2; JAK2EpoRDeaSHP1*SHP1Act*p1EpoRpJAK2/init_SHP1;  // modifiers: SHP1Act
  v_7: p2EpoRpJAK2 => EpoRJAK2; JAK2EpoRDeaSHP1*SHP1Act*p2EpoRpJAK2/init_SHP1;  // modifiers: SHP1Act
  v_8: p12EpoRpJAK2 => EpoRJAK2; JAK2EpoRDeaSHP1*SHP1Act*p12EpoRpJAK2/init_SHP1;  // modifiers: SHP1Act
  v_9: EpoRJAK2_CIS => ; EpoRJAK2_CIS*EpoRCISRemove*(p12EpoRpJAK2 + p1EpoRpJAK2)/init_EpoRJAK2;  // modifiers: p12EpoRpJAK2, p1EpoRpJAK2
  v_10: SHP1 => SHP1Act; SHP1*SHP1ActEpoR*(EpoRpJAK2 + p12EpoRpJAK2 + p1EpoRpJAK2 + p2EpoRpJAK2)/init_EpoRJAK2;  // modifiers: EpoRpJAK2, p12EpoRpJAK2, p1EpoRpJAK2, p2EpoRpJAK2
  v_11: SHP1Act => SHP1; SHP1Dea*SHP1Act;
  v_12: STAT5 => pSTAT5; STAT5*STAT5ActJAK2*(EpoRpJAK2 + p12EpoRpJAK2 + p1EpoRpJAK2 + p2EpoRpJAK2)/(init_EpoRJAK2*(SOCS3*SOCS3Inh/SOCS3Eqc + 1));  // modifiers: EpoRpJAK2, SOCS3, p12EpoRpJAK2, p1EpoRpJAK2, p2EpoRpJAK2
  v_13: STAT5 => pSTAT5; STAT5*STAT5ActEpoR*(p12EpoRpJAK2 + p1EpoRpJAK2)^2/(init_EpoRJAK2^2*(SOCS3*SOCS3Inh/SOCS3Eqc + 1)*(CIS*CISInh/CISEqc + 1));  // modifiers: CIS, SOCS3, p12EpoRpJAK2, p1EpoRpJAK2
  v_14: pSTAT5 => npSTAT5; STAT5Imp*pSTAT5;
  v_15: npSTAT5 => STAT5; STAT5Exp*npSTAT5;
  v_16: => CISnRNA1; CISRNAEqc*CISRNATurn*npSTAT5/init_STAT5;  // modifiers: npSTAT5
  v_17: CISnRNA1 => CISnRNA2; CISnRNA1*CISRNADelay;
  v_18: CISnRNA2 => CISnRNA3; CISnRNA2*CISRNADelay;
  v_19: CISnRNA3 => CISnRNA4; CISnRNA3*CISRNADelay;
  v_20: CISnRNA4 => CISnRNA5; CISnRNA4*CISRNADelay;
  v_21: CISnRNA5 => CISRNA; CISnRNA5*CISRNADelay;
  v_22: CISRNA => ; CISRNA*CISRNATurn;
  v_23: => CIS; CISRNA*CISEqc*CISTurn/CISRNAEqc;  // modifiers: CISRNA
  v_24: CIS => ; CIS*CISTurn;
  v_26: => SOCS3nRNA1; SOCS3RNAEqc*SOCS3RNATurn*npSTAT5/init_STAT5;  // modifiers: npSTAT5
  v_27: SOCS3nRNA1 => SOCS3nRNA2; SOCS3nRNA1*SOCS3RNADelay;
  v_28: SOCS3nRNA2 => SOCS3nRNA3; SOCS3nRNA2*SOCS3RNADelay;
  v_29: SOCS3nRNA3 => SOCS3nRNA4; SOCS3nRNA3*SOCS3RNADelay;
  v_30: SOCS3nRNA4 => SOCS3nRNA5; SOCS3nRNA4*SOCS3RNADelay;
  v_31: SOCS3nRNA5 => SOCS3RNA; SOCS3nRNA5*SOCS3RNADelay;
  v_32: SOCS3RNA => ; SOCS3RNA*SOCS3RNATurn;
  v_33: => SOCS3; SOCS3RNA*SOCS3Eqc*SOCS3Turn/SOCS3RNAEqc;  // modifiers: SOCS3RNA
  v_34: SOCS3 => ; SOCS3*SOCS3Turn;
end
